# Задание 1
x := 2
n := 5
y := (sqrt(x^3 + n) + cos(|n*x - 1|)^2)/(nthroot(x^5 + sin(x) + n, 4)*cos(π/4*(x + n))) = 2.52809
# Задание 2
x := 7
y := 10
z := -3
p := if(x > y and x ≤ y, sin(x) + 3*|y| - z^2, (y + 3)*ln(x + 1)/sqrt(z^2 + 1)) = 8.5485
q := if((x > y) and (x < 1), cos(x) + 2*|y + 1| - z, (x*y + 3)/sqrt(y^2 + 5)) = 7.12407
w := if(x < y or y ≥ 10, x^2 + 2*(y*x + 1) - z, (3 + x^-3*y^2)*sqrt(z^2 + 7)) = 194
# Задание 3
x := -2, -1.6 .. 2
f(x) := (x^2 - n*x + sin(x))*sqrt(|x - cos(n*x)|)
f(x) = [14.1048; 11.5301; 9.56509; 1.50067; 0.224988; 0; -1.31047; -3.18616; -1.7767; -5.86657; -8.5776]
x = [-2; -1.6; -1.2; -0.8; -0.4; 0; 0.4; 0.8; 1.2; 1.6; 2]
# Задание 4
n := 5
a := -3*n
b := 3*n
A := runif(3, a, b) = [-14.9619; -9.20031; 2.55018]
B := runif(3, a, b) = [-4.49076; 9.68513; -9.77613]
C := runif(3, a, b) = [6.31486; -5.88042; -12.2577]
# Без использования шаблонов | С использованием шаблонов
s := A[0]*B[0] + A[1]*B[1] + A[2]*B[2] = -46.8467
s := A*B = -46.8467
V := B×C = [-176.205; -116.781; -34.7527]
V := [B[1]*C[2] - C[1]*B[2]; -(B[0]*C[2] - B[2]*C[0]); B[0]*C[1] - C[0]*B[1]] = [-176.205; -116.781; -34.7527]
w := (A×B)*C = 3622.16
w := (A[1]*B[2] - B[1]*A[2])*C[0] - (A[0]*B[2] - A[2]*B[0])*C[1] + (A[0]*B[1] - B[0]*A[1])*C[2] = 3622.16
dA := sqrt(A[0]^2 + A[1]^2 + A[2]^2) = 17.7485
dB := sqrt(B[0]^2 + B[1]^2 + B[2]^2) = 14.4755
dC := sqrt(C[0]^2 + C[1]^2 + C[2]^2) = 14.9902
max(dA, dB, dC) = 17.7485
# Это A
M[13, 13] := 13
M = [
    0, 0, 0, 0, 0, 0, 0, 0, 0, 0, 0, 0, 0, 0;
    0, 0, 0, 0, 0, 0, 0, 0, 0, 0, 0, 0, 0, 0;
    0, 0, 0, 0, 0, 0, 0, 0, 0, 0, 0, 0, 0, 0;
    0, 0, 0, 0, 0, 0, 0, 0, 0, 0, 0, 0, 0, 0;
    0, 0, 0, 0, 0, 0, 0, 0, 0, 0, 0, 0, 0, 0;
    0, 0, 0, 0, 0, 0, 0, 0, 0, 0, 0, 0, 0, 0;
    0, 0, 0, 0, 0, 0, 0, 0, 0, 0, 0, 0, 0, 0;
    0, 0, 0, 0, 0, 0, 0, 0, 0, 0, 0, 0, 0, 0;
    0, 0, 0, 0, 0, 0, 0, 0, 0, 0, 0, 0, 0, 0;
    0, 0, 0, 0, 0, 0, 0, 0, 0, 0, 0, 0, 0, 0;
    0, 0, 0, 0, 0, 0, 0, 0, 0, 0, 0, 0, 0, 0;
    0, 0, 0, 0, 0, 0, 0, 0, 0, 0, 0, 0, 0, 0;
    0, 0, 0, 0, 0, 0, 0, 0, 0, 0, 0, 0, 0, 0;
    0, 0, 0, 0, 0, 0, 0, 0, 0, 0, 0, 0, 0, 13
]
i := 0 .. 13
j := 0 .. 13
M[i, j] := round(-10 + 21*rnd(1))
M = [
    -7, 11, -7, -10, 1, 3, -7, -1, -9, 6, 1, 8, 10, 1;
    0, 8, 6, 11, 3, -4, 8, -2, 4, -10, -4, 2, 8, 0;
    6, 0, 6, 3, 5, 2, -7, -1, 1, 6, -6, 0, 5, -7;
    -7, 5, -1, 10, -7, 7, -6, 7, -7, 5, -4, 4, 5, -7;
    8, 1, -1, 10, 2, 0, 8, 0, 11, 6, -6, 8, 1, -9;
    2, 1, 8, 4, 8, -8, -3, -4, -7, 8, 3, -5, -10, 7;
    -6, 2, -8, 6, 1, -1, 5, -1, 2, 3, 1, 5, -6, -6;
    0, -8, -8, 10, 9, -5, -1, 3, -1, 3, 8, 3, 2, -6;
    2, -5, 3, 2, 0, 6, 3, 7, 2, 9, 5, 4, -3, -4;
    -8, 8, -7, -8, 3, 1, -1, 0, -7, 5, 7, 8, -4, -7;
    6, 3, -8, 4, -8, -5, 9, 4, 0, 0, 1, 4, 3, -10;
    -8, 8, 6, -2, 2, 10, -6, -7, 10, -9, -9, -7, 8, 5;
    -10, 5, -5, -6, -3, -2, 7, 1, 7, -7, -2, -7, -9, 2;
    2, -3, 7, -4, 9, 6, -2, -5, -5, 1, -9, 1, -8, 9
]
S := sum(sum(M[i, j], j), i) = 91
SPos := sum(sum(M[i, j]*(M[i, j] > 0), j), i) = 542
SNeg := sum(sum(M[i, j]*(M[i, j] < 0), j), i) = -451
X := M[:, 0] = [-7; 0; 6; -7; 8; 2; -6; 0; 2; -8; 6; -8; -10; 2]
Y := transpose(M)[:, 11] = [-8; 8; 6; -2; 2; 10; -6; -7; 10; -9; -9; -7; 8; 5]
SMul := X*Y = 202
# Задание 5
y(x1) := e^(-(|x1|/3))*cos(x1)
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# Задание 6
x := -9, -8.75 .. 9
f(x) := if(x < 0, exp(x)*x^3, exp(-x)*x^3)
x = [
    -9; -8.75; -8.5; -8.25; -8; -7.75; -7.5; -7.25; -7; -6.75
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]
f(x) = [
    -0.0899657; -0.106157; -0.124955; -0.146701; -0.171757; -0.200504; -0.233332; -0.270632; -0.312776; -0.3601
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]
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# Задание 7
x[1] := -2*π
x[2] := 2*π
Δx := π/4
Nx := (x[2] - x[1])/Δx = 16
i := 0 .. Nx
g(x) := sqrt(|x|)*sin(x)
x[i] := x[1] + i*Δx
X[i] := x[i]
Y[i] := g(x[i])
X = [-6.28319; -5.49779; -3.92699; -3.14159; -2.35619; -1.5708; -0.785398; 0; 0.785398; 1.5708; 2.35619; 3.14159; 3.92699; 4.71239; 5.49779; 6.28319; 7.06858]
Y = [0; 1.65798; 1.40125; 0; -1.0854; -1.25331; -0.626657; 0; 0.626657; 1.25331; 1.0854; 0; -1.40125; -2.1708; -1.65798; 0; 1.87997]
WRITEPRN("X.txt") := X
WRITEPRN("Y.txt") := Y
XX := READPRN("X.txt")
YY := READPRN("Y.txt")
XX = [-6.283; -5.498; -3.927; -3.142; -2.356; -1.571; -0.7854; 0; 0.7854; 1.571; 2.356; 3.142; 3.927; 4.712; 5.498; 6.283; 7.069]
YY = [0; 1.658; 1.401; 0; -1.085; -1.253; -0.6267; 0; 0.6267; 1.253; 1.085; 0; -1.401; -2.171; -1.658; 0; 1.88]
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# Задание 8
q(x) := e^(-x^2)
x := -3, -2.99 .. 3
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# Задание 9
f(x, y) := sin(sqrt(x^2 + y^2))/sqrt(x^2 + y^2)
x := -15 .. 15
y := -15 .. 15
# [component: inputs f]
# Задание 10
f(x) := x^2 + (x - 2)*sin(x) - 5
x := -5 .. 5
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x := -5
x[1] := root(f(x), x) = -1.32936
f(x[1]) = -4.2772e-11
x := 5
x[2] := root(f(x), x) = 2.19967
f(x[2]) = 2.66454e-15
# Задание 11
f(x) := x^2 + x*sin(2*x) - (x - 5)*cos(x)
x := -4 .. 4
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x[1] := -4
x[1] := root(f(x), x, -4, -2) = -2.97354
f(x[1]) = -1.77636e-15
x[2] := 4
x[2] := root(f(x), x, -2, 0) = -1.93283
f(x[2]) = 0
# Задание 12
f(x) := x^3 + (4 - n)*x^2 + (3 - 4*n)*x - 3*n
n := 7
V := [-3*n; -1*n; 3*n; n] = [-21; -7; 21; 7]
R := polyroots(V) = [-3; -1; 1]
# Задание 13
n := 5
# 1. Матричный способ
A := [n, n + 1, n + 2; n - 3, n - 2, n; n - 1, n, n + 1] = [5, 6, 7; 2, 3, 5; 4, 5, 6]
B := [6*n + 8; 6*n - 7; 6*n + 2] = [38; 23; 32]
|A| = -1
X := A^-1*B
X = [1; 2; 3]
# 2. Given ... Find | 3. Проверка
x := 0
y := 0
z := 0
Given
x := X[0] = 1
n*x + (n + 1)*y + (n + 2)*z == 6*n + 8
A*X = [38; 23; 32]
y := X[1] = 2
(n - 3)*x + (n - 2)*y + n*z == 6*n - 7
z := X[2] = 3
(n - 1)*x + n*y + (n + 1)*z == 6*n + 2
V := Find(x, y, z) = [1; 2; 3]
# Задание 14
(x - 9)^2 + (y - 2)^2 == 25
x^2/81 + y^2/16 == 1
t := 0, 0.01 .. 2*π
x(t) := 9 + 5*cos(t)
xe(t) := 9*cos(t)
y(t) := 2 + 5*sin(t)
ye(t) := 4*sin(t)
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x := 0
y := 0
Given
x^2/81 + y^2/16 == 1
(x - 9)^2 + (y - 2)^2 == 25
Result := Find(x, y) = [4.23934; 3.52845]
x := 10
y := 0
Given
x^2/81 + y^2/16 == 1
(x - 9)^2 + (y - 2)^2 == 25
Result := Find(x, y) = [6.9308; -2.55175]
# Задание 15
Δx := 0.1
f(x) := x*sin(x)
x := 0, 0 + Δx .. 10
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x := 5
x1_min := Minimize(f, x) = 4.91318
y1_min := f(x1_min) = -4.81447
x := 2
x1_max := Maximize(f, x) = 2.02876
y1_max := f(x1_max) = 1.81971
x := 8
x2_max := Maximize(f, x) = 7.97867
y2_max := f(x2_max) = 7.91673
