Задание1
A := [-2; -4]
B := [-3; 0]
C := [0; 4]
D := [3; 0]
E := [2; -4]
H := [2; 0]
F := [-2; 0]
X2 := transpose([F[0], B[0], C[0], D[0], H[0], E[0], A[0], F[0], H[0]])
Y2 := transpose([F[1], B[1], C[1], D[1], H[1], E[1], A[1], F[1], H[1]])
xL := min(X2)
yH := max(Y2)
xH := max(X2)
yL := min(Y2)
xL = -3
yH = 4
xH = 3
yL = -4
xLW := 100
yLW := 200
xHW := 400
yHW := 500
ΔyW := yHW - yLW
ΔyW = 300
ΔxW := xHW - xLW
ΔxW = 300
Δy := yL - yH
Δy = -8
Δx := xH - xL
Δx = 6
kx := ΔxW/Δx
kx = 50
ky := ΔyW/Δy
ky = -37.5
TSW := [kx, 0, xLW - kx*xL; 0, -ky, yHW + ky*yL; 0, 0, 1]
[Xaw; Yaw; q] := TSW*[A[0]; A[1]; 1] = [150; 500; 1]
[Xbw; Ybw; q] := TSW*[B[0]; B[1]; 1] = [100; 650; 1]
[Xcw; Ycw; q] := TSW*[C[0]; C[1]; 1] = [250; 800; 1]
[Xdw; Ydw; q] := TSW*[D[0]; D[1]; 1] = [400; 650; 1]
[Xew; Yew; q] := TSW*[E[0]; E[1]; 1] = [350; 500; 1]
[Xfw; Yfw; q] := TSW*[F[0]; F[1]; 1] = [150; 650; 1]
[Xhw; Yhw; q] := TSW*[H[0]; H[1]; 1] = [350; 650; 1]
XW := transpose([Xfw, Xbw, Xcw, Xdw, Xhw, Xew, Xaw, Xfw, Xhw])
YW := transpose([Yfw, Ybw, Ycw, Ydw, Yhw, Yew, Yaw, Yfw, Yhw])
# График в МСК | График в ОСК
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Задание2
x := NaN
y := NaN
f(x) := sin(π*x)*sqrt(|x|)
x := -6, -5.9 .. 6
x1 := -6
x2 := 6
h := 0.1
Nx := (x2 - x1)/h = 120
i := 0 .. Nx
x[i] := x1 + i*h
xL := min(x)
yH := max(f(x))
xH := max(x)
yL := min(f(x))
xL = -6
yH = 6.1985
xH = 6
yL = -6.1985
xLW := 100
yLW := 200
xHW := 800
yHW := 900
ΔyW := yHW - yLW
ΔyW = 700
ΔxW := xHW - xLW
ΔxW = 700
Δy := yH - yL
Δy = 12.397
Δx := xH - xL
Δx = 12
kx := ΔxW/Δx
kx = 58.3333
ky := ΔyW/Δy
ky = 56.4653
TSW := [kx, 0, xLW - kx*xL; 0, -ky, yHW + ky*yL; 0, 0, 1]
[XW1[i]; YW1[i]; q] := TSW*[x[i]; f(x[i]); 1]
# График по результатам f(x) в МСК
# График в ОСК
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