# Задание 1
# Исходные данные:
Xa := -2
Xb := -3
Xc := 0
Xd := 3
Xe := 2
Xf := -2
Xg := 2
Ya := -4
Yb := 0
Yc := 4
Yd := 0
Ye := -4
Yf := 0
Yg := 0
Xlw := 100
Xhw := 400  # левый верхний угол области отображения
Ylw := 200
Yhw := 500  # правый нижний угол области отображения
# Координаты области в МСК:
Zx := transpose([Xa, Xb, Xc, Xd, Xe, Xf, Xg])
Zy := transpose([Ya, Yb, Yc, Yd, Ye, Yf, Yg])
Xl := min(Zx)
Xl = -3
Yh := max(Zy)
Yh = 4  # левый верхний угол
Xh := max(Zx)
Xh = 3  # правый нижний угол
Yl := min(Zy)
Yl = -4
# Параметры для формирования матрицы пересчета координат:
ΔXw := Xhw - Xlw
ΔXw = 300  # ширина области отображения в ОСК
Δx := Xh - Xl
Δx = 6  # ширина области отображения в МСК
ΔYw := Yhw - Ylw
ΔYw = 300  # высота области отображения в ОСК
Δy := Yh - Yl
Δy = 8  # высота области отображения в МСК
Kx := ΔXw/Δx
Kx = 50
# коэффициенты необходимые для нормализации значений (единицы измерения в пиксели)
Ky := ΔYw/Δy
Ky = 37.5
Tsw := [Kx, 0, Xlw - Kx*Xl; 0, -Ky, Yhw + Ky*Yl; 0, 0, 1]  # матрица пересчета из МСК в ОСК
# Координаты вершины в ОСК
[Xaw; Yaw; q] := Tsw*[Xa; Ya; 1]
[Xaw; Yaw; q] = [150; 500; 1]
[Xbw; Ybw; q] := Tsw*[Xb; Yb; 1]
[Xbw; Ybw; q] = [100; 350; 1]
[Xcw; Ycw; q] := Tsw*[Xc; Yc; 1]
[Xcw; Ycw; q] = [250; 200; 1]
[Xdw; Ydw; q] := Tsw*[Xd; Yd; 1]
[Xdw; Ydw; q] = [400; 350; 1]
[Xew; Yew; q] := Tsw*[Xe; Ye; 1]
[Xew; Yew; q] = [350; 500; 1]
[Xfw; Yfw; q] := Tsw*[Xf; Yf; 1]
[Xfw; Yfw; q] = [150; 350; 1]
[Xgw; Ygw; q] := Tsw*[Xg; Yg; 1]
[Xgw; Ygw; q] = [350; 350; 1]
X := transpose([Xb, Xc, Xd, Xb, Xf, Xa, Xe, Xg, Xd])  # Подставляем точки в порядке соответствия координат по x/y
Y := transpose([Yb, Yc, Yd, Yb, Yf, Ya, Ye, Yg, Yd])
Xw := transpose([Xbw, Xcw, Xdw, Xbw, Xfw, Xaw, Xew, Xgw, Xdw])
Yw := transpose([Ybw, Ycw, Ydw, Ybw, Yfw, Yaw, Yew, Ygw, Ydw])
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# Задание 2
f(x) := sin(π*x)*sqrt(|x|)
x1 := -6
x2 := 6
Δx := 0.1
Xlw := 100
Ylw := 200  # Левый верхний угол
Xhw := 800
Yhw := 900  # Правый нижний угол
N := round((x2 - x1)/Δx)
N = 120  # Число точек графика
i := 0 .. N
X[i] := x1 + i*Δx  # Заполняем массивы значениями. Для МСК - 1
Y[i] := f(X[i])
Z[i] := 1
# Определяем область графика в МСК:
Xl := min(X)
Yh := max(Y)
# левый верхний угол
Xl = -6
Yh = 2.34521
Xh := max(X)
Yl := min(Y)
# правый нижний угол
Xh = 6
Yl = -2.34521
Ms := stack(transpose(X), transpose(Y), transpose(Z))  # Матрица координат точек МСК
# Параметры для создания матрицы перехода
ΔXw := Xhw - Xlw
ΔXw = 700
ΔX := Xh - Xl
ΔX = 12
ΔYw := Yhw - Ylw
ΔYw = 700
ΔY := Yh - Yl
ΔY = 4.69042
Kx := ΔXw/ΔX
Kx = 58.3333
Ky := ΔYw/ΔY
Ky = 149.241
Tsw := [Kx, 0, Xlw - Kx*Xl; 0, Ky, Yhw + Ky*Yl; 0, 0, 1]
# Матрица координат точек графика в ОСК
Mw := Tsw*Ms
# Из этой матрицы выбираем только x и y (координаты точек графика)
Xw := transpose(Mw)[:, 0]
Yw := transpose(Mw)[:, 1]
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