# В МСК задана трапеция, следующими точками:
Ax := 4
Bx := 4
Cx := 6
Dx := 6
Ay := 2
By := 8
Cy := 7
Dy := 3
# Построим фигуру:
X := [Ax; Bx; Cx; Dx; Ax]
Y := [Ay; By; Cy; Dy; Ay]
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# Нахождение точки пересечения прямых BC и AD в точке P:
k1 := 0
b1 := 0
Given
By == k1*Bx + b1
Cy == k1*Cx + b1
G := Find(k1, b1) → [-1/2; 10] = [-0.5; 10]
Find(k1, b1) := □  # error: Пустой местозаполнитель.
k1 := -1/2
b1 := 10
# Уравнение прямой BC:
y == k1*x + b1
Given
Ay == k2*Ax + b2
Dy == k2*Dx + b2
Find(k2, b2) → [1/2; 0]
k2 := 1/2
b2 := 0
# Уравнение прямой AD:
Given
y == k1*x + b1
y == k2*x + b2
Find(x, y) → [10; 5]
# Точка пересечения P:
Px := 10
Py := 5
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# Исходные координаты:
P := [Ax, Bx, Cx, Dx; Ay, By, Cy, Dy; 1, 1, 1, 1] = [4, 4, 6, 6; 2, 8, 7, 3; 1, 1, 1, 1]
# Параллельный сдвиг СК:
Ts(dx, dy) := [1, 0, -dx; 0, 1, -dy; 0, 0, 1]
# Матрица поворота СК:
Ro(φ) := [cos(φ), -sin(φ), 0; sin(φ), cos(φ), 0; 0, 0, 1]
φ := -90
φ_rad := φ*π/180 = -1.5708
# 1. Сместим СК в точку P:
A1 := Ts(Px, Py)*P = [-6, -6, -4, -4; -3, 3, 2, -2; 1, 1, 1, 1]
# 2. Повернем объект на 90 градусов:
A2 := Ro(φ_rad)*A1 = [-3, 3, 2, -2; 6, 6, 4, 4; 1, 1, 1, 1]
# 3. Вернем готовую СК в исходное положение:
A3 := Ts(-Px, -Py)*A2 = [7, 13, 12, 8; 11, 11, 9, 9; 1, 1, 1, 1]
# Повернутая на 90 прямая AD:
Xad := [A3[0, 0]; A3[0, 1]]
Yad := [A3[1, 0]; A3[1, 1]]
# Повернутая на 90 прямая BC:
Xbc := [A3[0, 2]; A3[0, 3]]
Ybc := [A3[1, 2]; A3[1, 3]]
Xrot := [A3[0, 0]; A3[0, 1]; A3[0, 2]; A3[0, 3]; A3[0, 0]]
Yrot := [A3[1, 0]; A3[1, 1]; A3[1, 2]; A3[1, 3]; A3[1, 0]]
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